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/batch
! ANSYS input file written by Workbench version 2025 R2
! File used for geometry attach: C:\Users\admin\Desktop\LIDIX\ansys\układ_bimorficzny_polimer__1_files\dp0\Geom\DM\Geom.agdb
/title,uk_ad_bimorficzny_polimer__1--Harmonic Response (C5)
/COM,/COM,     ANSYSMotion, 2025.2

/com,--- Data in consistent MKS units. See Solving Units in the help system for more information.
/units,MKS
/prep7
! Turn off shape checking because checks already performed inside WB mesher.
! See help system for more information.
SHPP,OFF,,NOWARN
etcon,set             ! allow ANSYS to choose best KEYOP's for 180x elements, resets any applicable keyopt to MAPDL defaults
/com,*********** Send User Defined Coordinate System(s) ***********
csys,0
/com,*********** Nodes for the whole assembly ***********
nblock,3,,4295
(1i9,3e20.9e3)
        1     2.360524559E-02     0.000000000E+00     3.217424099E-02
        2     2.759168446E-02     0.000000000E+00     2.866262074E-02
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-1
/com,*********** Elements for Body 1 'piezo' ***********
et,1,186
keyo,1,2,1          ! set full integration on SOLID186
MAT,1 $ TYPE,1 $ REAL,1 $ SECNUM,1 $ ESYS,0
eblock,11,COMPACT,,108
(11i9)
        1       73       85       86       84      100       88       87       89      504      532
      530      503      539      535      536      543      505      533      534      531
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-1
secnum,1    ! reset the section ID to default
/com,*********** Elements for Body 2 'masa' ***********
et,2,186
keyo,2,2,1          ! set full integration on SOLID186
MAT,2 $ TYPE,2 $ REAL,2 $ SECNUM,2 $ ESYS,0
eblock,11,COMPACT,,180
(11i9)
      109      865     1075     1112     1120      996     1097     1111     1125     1181     1792
     1855     1182     1616     1836     1853     1617     1180     1791     1852     1872
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-1
secnum,1    ! reset the section ID to default
/com,*********** Elements for Body 3 'piezo' ***********
et,3,186
keyo,3,2,1          ! set full integration on SOLID186
MAT,3 $ TYPE,3 $ REAL,3 $ SECNUM,3 $ ESYS,0
eblock,11,COMPACT,,91
(11i9)
      289     2014     2023     2021     2022     2041     2032     2034     2033     2382     2397
     2396     2381     2423     2421     2425     2426     2383     2401     2398     2399
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-1
secnum,1    ! reset the section ID to default
/com,*********** Elements for Body 4 'belka' ***********
et,4,186
keyo,4,2,1          ! set full integration on SOLID186
MAT,4 $ TYPE,4 $ REAL,4 $ SECNUM,4 $ ESYS,0
eblock,11,COMPACT,,152
(11i9)
      380     2829     3057     3056     3055     2830     2962     2963     2964     3466     3899
     3898     3465     3469     3757     3759     3470     3464     3758     3760     3762
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-1
secnum,1    ! reset the section ID to default
toffst,273.15,      ! Temperature offset from absolute zero
/com,*********** Set Reference Temperature ***********
tref,22.
/com,*********** Send Materials ***********

TB,ELASTIC,1,,,AELS

TBDATA,1,2000000000,500000000,400000000,0,0,0
TBDATA,7,2000000000,400000000,0,0,0,2300000000
TBDATA,13,0,0,0,750000000,0,0
TBDATA,19,800000000,0,800000000
MP,DENS,1,1780,	! kg m^-3

TB,DPER,1,,,0

TBDATA,1,12,12,10,0,0,0

TB,PIEZ,1,,,0

TBDATA,1,0,0,-23,0,0,-23
TBDATA,7,0,0,33,0,0,0
TBDATA,13,0,12,0,12,0,0

Temperature = 'TEMP' ! Temperature
MP,DENS,2,19250,	! kg m^-3
MP,ALPX,2,1.2e-05,	! C^-1
MP,KXX,2,60.5,	! W m^-1 C^-1
MP,EX,2,410000000000,	! Pa
MP,NUXY,2,0.26,
MP,MURX,2,10000,


TB,ELASTIC,3,,,AELS

TBDATA,1,2000000000,500000000,400000000,0,0,0
TBDATA,7,2000000000,400000000,0,0,0,2300000000
TBDATA,13,0,0,0,750000000,0,0
TBDATA,19,800000000,0,800000000
MP,DENS,3,1780,	! kg m^-3

TB,DPER,3,,,0

TBDATA,1,12,12,10,0,0,0

TB,PIEZ,3,,,0

TBDATA,1,0,0,23,0,0,23
TBDATA,7,0,0,-33,0,0,0
TBDATA,13,0,-12,0,-12,0,0

Temperature = 'TEMP' ! Temperature
MP,DENS,4,7850,	! kg m^-3
MP,ALPX,4,1.2e-05,	! C^-1
MP,C,4,434,	! J kg^-1 C^-1
MP,KXX,4,60.5,	! W m^-1 C^-1
MP,RSVX,4,1.7e-07,	! kg m^3 A^-2 s^-3
MP,EX,4,200000000000,	! Pa
MP,NUXY,4,0.3,
MP,MURX,4,10000,

!************************* Model Summary ********************
!piezo,	polimer,	matid,	1
!masa,	Tungsten,	matid,	2
!piezo,	polimer 2,	matid,	3
!belka,	Structural Steel,	matid,	4
!************************* End Model Summary ********************
/com,*********** Create Contact "Contact Region" ***********
*set,tid,6
*set,cid,5
r,tid
r,cid
et,tid,170
et,cid,174
MAT,6 $ TYPE,6 $ REAL,6 $ SECNUM,6 $ ESYS,0
eblock,11,COMPACT,,108
(11i9)
     1598       71       75       37       37      497      428       37      427
     1599       32       33       38       38      407      411       38      408
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-1
secnum,1    ! reset the section ID to default
MAT,5 $ TYPE,5 $ REAL,5 $ SECNUM,5 $ ESYS,0
eblock,11,COMPACT,,108
(11i9)
     1706       71       75       37       37      497      428       37      427
     1707       32       33       38       38      407      411       38      408
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-1
secnum,1    ! reset the section ID to default
MAT,5 $ TYPE,5 $ REAL,6 $ SECNUM,5 $ ESYS,0
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MAT,6 $ TYPE,6 $ REAL,5 $ SECNUM,6 $ ESYS,0
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keyo,cid,8,2               ! auto create asymmetric contact (from Program Controlled setting)
keyo,cid,10,0              ! adjust contact stiffness each NR iteration (from Program Controlled setting)
keyo,cid,12,5              ! bonded always
keyo,cid,18,1              ! small sliding turned on by application
keyo,cid,2,0               ! augmented Lagrange (from Program Controlled setting)
keyo,cid,4,0               ! on Gauss point (from Program Controlled setting)
keyo,cid,9,1               ! ignore initial gaps/penetration
keyo,cid,7,0               ! No Prediction
rmod,tid,3,10.      ! FKN
rmod,tid,5,0.       ! ICONT
rmod,tid,6,0.       ! PINB
rmod,tid,10,0.      ! CNOF
rmod,tid,12,0.      ! FKT
rmod,tid,36,608     ! WB DSID
rmod,cid,3,10.      ! FKN
rmod,cid,5,0.       ! ICONT
rmod,cid,6,0.       ! PINB
rmod,cid,10,0.      ! CNOF
rmod,cid,12,0.      ! FKT
rmod,cid,36,608     ! WB DSID
/com,*********** Create Contact "Contact Region 2" ***********
*set,tid,8
*set,cid,7
r,tid
r,cid
et,tid,170
et,cid,174
MAT,8 $ TYPE,8 $ REAL,8 $ SECNUM,8 $ ESYS,0
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MAT,7 $ TYPE,7 $ REAL,7 $ SECNUM,7 $ ESYS,0
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MAT,7 $ TYPE,7 $ REAL,8 $ SECNUM,7 $ ESYS,0
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MAT,8 $ TYPE,8 $ REAL,7 $ SECNUM,8 $ ESYS,0
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keyo,cid,8,2               ! auto create asymmetric contact (from Program Controlled setting)
keyo,cid,10,0              ! adjust contact stiffness each NR iteration (from Program Controlled setting)
keyo,cid,12,5              ! bonded always
keyo,cid,18,1              ! small sliding turned on by application
keyo,cid,2,0               ! augmented Lagrange (from Program Controlled setting)
keyo,cid,4,0               ! on Gauss point (from Program Controlled setting)
keyo,cid,9,1               ! ignore initial gaps/penetration
keyo,cid,7,0               ! No Prediction
rmod,tid,3,10.      ! FKN
rmod,tid,5,0.       ! ICONT
rmod,tid,6,0.       ! PINB
rmod,tid,10,0.      ! CNOF
rmod,tid,12,0.      ! FKT
rmod,tid,36,611     ! WB DSID
rmod,cid,3,10.      ! FKN
rmod,cid,5,0.       ! ICONT
rmod,cid,6,0.       ! PINB
rmod,cid,10,0.      ! CNOF
rmod,cid,12,0.      ! FKT
rmod,cid,36,611     ! WB DSID
/com,*********** Create Contact "Contact Region 3" ***********
*set,tid,10
*set,cid,9
r,tid
r,cid
et,tid,170
et,cid,174
MAT,10 $ TYPE,10 $ REAL,10 $ SECNUM,10 $ ESYS,0
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MAT,9 $ TYPE,9 $ REAL,9 $ SECNUM,9 $ ESYS,0
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MAT,9 $ TYPE,9 $ REAL,10 $ SECNUM,9 $ ESYS,0
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MAT,10 $ TYPE,10 $ REAL,9 $ SECNUM,10 $ ESYS,0
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keyo,cid,8,2               ! auto create asymmetric contact (from Program Controlled setting)
keyo,cid,10,0              ! adjust contact stiffness each NR iteration (from Program Controlled setting)
keyo,cid,12,5              ! bonded always
keyo,cid,18,1              ! small sliding turned on by application
keyo,cid,2,0               ! augmented Lagrange (from Program Controlled setting)
keyo,cid,4,0               ! on Gauss point (from Program Controlled setting)
keyo,cid,9,1               ! ignore initial gaps/penetration
keyo,cid,7,0               ! No Prediction
rmod,tid,3,10.      ! FKN
rmod,tid,5,0.       ! ICONT
rmod,tid,6,0.       ! PINB
rmod,tid,10,0.      ! CNOF
rmod,tid,12,0.      ! FKT
rmod,tid,36,614     ! WB DSID
rmod,cid,3,10.      ! FKN
rmod,cid,5,0.       ! ICONT
rmod,cid,6,0.       ! PINB
rmod,cid,10,0.      ! CNOF
rmod,cid,12,0.      ! FKT
rmod,cid,36,614     ! WB DSID
nsel,all
esel,all
/com,*********** Send Named Selection as Element Component ***********
esel,s,type,,1
cm,SELECTION,elem
esel,all
/com,*********** Send Named Selection as Element Component ***********
esel,s,type,,1
esel,a,type,,3
cm,SELECTION1,elem
esel,all
/com,*********** Fixed Supports ***********
CMBLOCK,_FIXEDSU,NODE,       13
(8i10)
      2956     -2963      3009      3028      3056     -3063      3744     -3758
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cmsel,s,_FIXEDSU
d,all,all
nsel,all
/com,*********** Define Force Using Surface Effect Elements ***********
local,12,0,0.,0.,0.,0.,0.,0.
csys,0
et,11,154
MAT,11 $ TYPE,11 $ REAL,11 $ SECNUM,11 $ ESYS,12
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esel,s,type,,11
keyop,11,2,1        ! Apply load in local coordinate system
keyop,11,7,1        ! Use original area so load is constant in large deformation
esel,all

*DIM,_loadvari104x,TABLE,1,1,1,FREQ, , , 0
! Frequency values
*TAXIS,_loadvari104x(1),1,1.
! Load values
_loadvari104x(1,1,1) = 0.


*DIM,_loadvari104xi,TABLE,1,1,1,FREQ, , , 0
! Frequency values
*TAXIS,_loadvari104xi(1),1,1.
! Load values
_loadvari104xi(1,1,1) = 0.


*DIM,_loadvari104y,TABLE,1,1,1,FREQ, , , 0
! Frequency values
*TAXIS,_loadvari104y(1),1,1.
! Load values
_loadvari104y(1,1,1) = -166.666666666679


*DIM,_loadvari104yi,TABLE,1,1,1,FREQ, , , 0
! Frequency values
*TAXIS,_loadvari104yi(1),1,1.
! Load values
_loadvari104yi(1,1,1) = 0.


*DIM,_loadvari104z,TABLE,1,1,1,FREQ, , , 0
! Frequency values
*TAXIS,_loadvari104z(1),1,1.
! Load values
_loadvari104z(1,1,1) = 0.


*DIM,_loadvari104zi,TABLE,1,1,1,FREQ, , , 0
! Frequency values
*TAXIS,_loadvari104zi(1),1,1.
! Load values
_loadvari104zi(1,1,1) = 0.


fini
/com,*********** Performing Modal Solve ***********
/solu
antype,2
modcontrol,on,,,    !
thexpand,off     ! ignore thermal strains
mxpand,,,,yes,,no     ! expand element results for stress/strains, but not write them to file.mode
outres,erase
outres,all,none
outres,nsol,all
outres,eangl,all
outres,veng,all
outres,strs,all,
outres,epel,all,
outres,rsol,all
outres,cont,all,
modopt,lanb,200,0.,50.
fdele,all,all
sfdele,all,all
sfedele,all,all,all
acel,0,0,0                 ! zero out the acceleration
/com,*********** Setting and Solving Each Load Step ***********
esel,s,type,,11
nsle
sfe,all,2,pres,1,1
nsel,all
esel,all
solve
/com,**********************
/com *************** Write FE CONNECTORS *********
CEWRITE,file,ce,,INTE
fini
/com,*********** Performing MSUP Harmonic Solve ***********
/solu
antype,harm
hropt,msup
thexpand,off     ! ignore thermal strains
hrout,off
kbc,1
harfrq,0,25
nsub,100
fdele,all,all
sfdele,all,all
sfedele,all,all,all
acel,0,0,0                 ! zero out the acceleration
lvscale,0,1
/com,*********** Scaling Each Load Step for MSUP Solve ***********
lvscale,%_loadvari104y%,1
! *********** WB SOLVE COMMAND ***********
! check interactive state
*get,ANSINTER_,active,,int
*if,ANSINTER_,ne,0,then
/eof
*endif
solve

fini
! ------- MSUP EXPANSION PASS -------
/solu
expass,on
hrexp,all
outres,erase
outres,all,none
outres,nsol,all
outres,eangl,all
outres,veng,all
outres,strs,all,
outres,epel,all,
outres,rsol,all
outres,cont,all,
numexp,all,,,yes        ! expand results at all freq. and calculate requested result items
! *********** WB SOLVE COMMAND ***********
! check interactive state
*get,ANSINTER_,active,,int
*if,ANSINTER_,ne,0,then
/eof
*endif
solve
/com *************** Write FE CONNECTORS *********
CEWRITE,file,ce,,INTE
fini
/post1
fini
