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/batch
! ANSYS input file written by Workbench version 2025 R2
! File used for geometry attach: C:\Users\admin\Desktop\LIDIX\ansys\układ_bimorficzny_polimer__1_files\dp0\Geom\DM\Geom.agdb
/title,uk_ad_bimorficzny_polimer__1--Coupled Field Harmonic (D5)
/COM,/COM,     ANSYSMotion, 2025.2

/com,--- Data in consistent MKS units. See Solving Units in the help system for more information.
/units,MKS
/prep7
! Turn off shape checking because checks already performed inside WB mesher.
! See help system for more information.
SHPP,OFF,,NOWARN
etcon,set             ! allow ANSYS to choose best KEYOP's for 180x elements, resets any applicable keyopt to MAPDL defaults
/com,*********** Send User Defined Coordinate System(s) ***********
csys,0
/com,*********** Nodes for the whole assembly ***********
nblock,3,,4295
(1i9,3e20.9e3)
        1     2.360524559E-02     0.000000000E+00     3.217424099E-02
        2     2.759168446E-02     0.000000000E+00     2.866262074E-02
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-1
/com,*********** Elements for Body 1 'piezo' ***********
et,1,226
keyo,1,1,1001    !  structural-electrostatic
keyo,1,4,4          ! Turn off Electrostatic force coupling effects
MAT,1 $ TYPE,1 $ REAL,1 $ SECNUM,1 $ ESYS,0
eblock,11,COMPACT,,108
(11i9)
        1       73       85       86       84      100       88       87       89      504      532
      530      503      539      535      536      543      505      533      534      531
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-1
secnum,1    ! reset the section ID to default
/com,*********** Elements for Body 2 'masa' ***********
et,2,226
keyo,2,1,1001    !  structural-electrostatic
keyo,2,4,4          ! Turn off Electrostatic force coupling effects
MAT,2 $ TYPE,2 $ REAL,2 $ SECNUM,2 $ ESYS,0
eblock,11,COMPACT,,180
(11i9)
      109      865     1075     1112     1120      996     1097     1111     1125     1181     1792
     1855     1182     1616     1836     1853     1617     1180     1791     1852     1872
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-1
secnum,1    ! reset the section ID to default
/com,*********** Elements for Body 3 'piezo' ***********
et,3,226
keyo,3,1,1001    !  structural-electrostatic
keyo,3,4,4          ! Turn off Electrostatic force coupling effects
MAT,3 $ TYPE,3 $ REAL,3 $ SECNUM,3 $ ESYS,0
eblock,11,COMPACT,,91
(11i9)
      289     2014     2023     2021     2022     2041     2032     2034     2033     2382     2397
     2396     2381     2423     2421     2425     2426     2383     2401     2398     2399
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-1
secnum,1    ! reset the section ID to default
/com,*********** Elements for Body 4 'belka' ***********
et,4,226
keyo,4,1,1001    !  structural-electrostatic
keyo,4,4,4          ! Turn off Electrostatic force coupling effects
MAT,4 $ TYPE,4 $ REAL,4 $ SECNUM,4 $ ESYS,0
eblock,11,COMPACT,,152
(11i9)
      380     2829     3057     3056     3055     2830     2962     2963     2964     3466     3899
     3898     3465     3469     3757     3759     3470     3464     3758     3760     3762
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-1
secnum,1    ! reset the section ID to default
toffst,273.15,      ! Temperature offset from absolute zero
/com,*********** Set Reference Temperature ***********
tref,22.
/com,*********** Send Materials ***********

TB,ANEL,1,,,0

TBDATA,1,2000000000,500000000,400000000,0,0,0
TBDATA,7,2000000000,400000000,0,0,0,2300000000
TBDATA,13,0,0,0,750000000,0,0
TBDATA,19,800000000,0,800000000
MP,DENS,1,1780,	! kg m^-3

TB,DPER,1,,,0

TBDATA,1,12,12,10,0,0,0

TB,PIEZ,1,,,0

TBDATA,1,0,0,-23,0,0,-23
TBDATA,7,0,0,33,0,0,0
TBDATA,13,0,12,0,12,0,0

Temperature = 'TEMP' ! Temperature
MP,DENS,2,19250,	! kg m^-3
MP,ALPX,2,1.2e-05,	! C^-1
MP,KXX,2,60.5,	! W m^-1 C^-1
MP,EX,2,410000000000,	! Pa
MP,NUXY,2,0.26,
MP,MURX,2,10000,


TB,ANEL,3,,,0

TBDATA,1,2000000000,500000000,400000000,0,0,0
TBDATA,7,2000000000,400000000,0,0,0,2300000000
TBDATA,13,0,0,0,750000000,0,0
TBDATA,19,800000000,0,800000000
MP,DENS,3,1780,	! kg m^-3

TB,DPER,3,,,0

TBDATA,1,12,12,10,0,0,0

TB,PIEZ,3,,,0

TBDATA,1,0,0,23,0,0,23
TBDATA,7,0,0,-33,0,0,0
TBDATA,13,0,-12,0,-12,0,0

Temperature = 'TEMP' ! Temperature
MP,DENS,4,7850,	! kg m^-3
MP,ALPX,4,1.2e-05,	! C^-1
MP,C,4,434,	! J kg^-1 C^-1
MP,KXX,4,60.5,	! W m^-1 C^-1
MP,RSVX,4,1.7e-07,	! kg m^3 A^-2 s^-3
MP,EX,4,200000000000,	! Pa
MP,NUXY,4,0.3,
MP,MURX,4,10000,

!************************* Model Summary ********************
!piezo,	polimer,	matid,	1
!masa,	Tungsten,	matid,	2
!piezo,	polimer 2,	matid,	3
!belka,	Structural Steel,	matid,	4
!************************* End Model Summary ********************
/com,*********** Create Contact "Contact Region" ***********
*set,tid,6
*set,cid,5
r,tid
r,cid
et,tid,170
et,cid,174
MAT,6 $ TYPE,6 $ REAL,6 $ SECNUM,6 $ ESYS,0
eblock,11,COMPACT,,108
(11i9)
     1598       71       75       37       37      497      428       37      427
     1599       32       33       38       38      407      411       38      408
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-1
secnum,1    ! reset the section ID to default
MAT,5 $ TYPE,5 $ REAL,5 $ SECNUM,5 $ ESYS,0
eblock,11,COMPACT,,108
(11i9)
     1706       71       75       37       37      497      428       37      427
     1707       32       33       38       38      407      411       38      408
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-1
secnum,1    ! reset the section ID to default
MAT,5 $ TYPE,5 $ REAL,6 $ SECNUM,5 $ ESYS,0
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MAT,6 $ TYPE,6 $ REAL,5 $ SECNUM,6 $ ESYS,0
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keyo,cid,8,2               ! auto create asymmetric contact (from Program Controlled setting)
keyo,cid,10,0              ! adjust contact stiffness each NR iteration (from Program Controlled setting)
keyo,cid,12,5              ! bonded always
keyo,cid,18,1              ! small sliding turned on by application
keyo,cid,2,0               ! augmented Lagrange (from Program Controlled setting)
keyo,cid,4,0               ! on Gauss point (from Program Controlled setting)
keyo,cid,9,1               ! ignore initial gaps/penetration
keyo,cid,7,0               ! No Prediction
rmod,tid,3,10.      ! FKN
rmod,tid,5,0.       ! ICONT
rmod,tid,6,0.       ! PINB
rmod,tid,10,0.      ! CNOF
rmod,tid,12,0.      ! FKT
rmod,tid,36,608     ! WB DSID
rmod,cid,3,10.      ! FKN
rmod,cid,5,0.       ! ICONT
rmod,cid,6,0.       ! PINB
rmod,cid,10,0.      ! CNOF
rmod,cid,12,0.      ! FKT
rmod,cid,36,608     ! WB DSID
*set,_maxPerm,1.00345333333333e-006
rmod,cid,19,_maxPerm/_ASMDIAG         ! ECC, Divide by Length since Traction Based
rmod,tid,19,_maxPerm/_ASMDIAG      ! ECC, Divide by Length since Traction Based
keyo,cid,1,5       ! Structural-Electric contact
/com,*********** Create Contact "Contact Region 2" ***********
*set,tid,8
*set,cid,7
r,tid
r,cid
et,tid,170
et,cid,174
MAT,8 $ TYPE,8 $ REAL,8 $ SECNUM,8 $ ESYS,0
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MAT,7 $ TYPE,7 $ REAL,7 $ SECNUM,7 $ ESYS,0
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MAT,7 $ TYPE,7 $ REAL,8 $ SECNUM,7 $ ESYS,0
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MAT,8 $ TYPE,8 $ REAL,7 $ SECNUM,8 $ ESYS,0
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keyo,cid,8,2               ! auto create asymmetric contact (from Program Controlled setting)
keyo,cid,10,0              ! adjust contact stiffness each NR iteration (from Program Controlled setting)
keyo,cid,12,5              ! bonded always
keyo,cid,18,1              ! small sliding turned on by application
keyo,cid,2,0               ! augmented Lagrange (from Program Controlled setting)
keyo,cid,4,0               ! on Gauss point (from Program Controlled setting)
keyo,cid,9,1               ! ignore initial gaps/penetration
keyo,cid,7,0               ! No Prediction
rmod,tid,3,10.      ! FKN
rmod,tid,5,0.       ! ICONT
rmod,tid,6,0.       ! PINB
rmod,tid,10,0.      ! CNOF
rmod,tid,12,0.      ! FKT
rmod,tid,36,611     ! WB DSID
rmod,cid,3,10.      ! FKN
rmod,cid,5,0.       ! ICONT
rmod,cid,6,0.       ! PINB
rmod,cid,10,0.      ! CNOF
rmod,cid,12,0.      ! FKT
rmod,cid,36,611     ! WB DSID
*set,_maxPerm,1.00345333333333e-006
rmod,cid,19,_maxPerm/_ASMDIAG         ! ECC, Divide by Length since Traction Based
rmod,tid,19,_maxPerm/_ASMDIAG      ! ECC, Divide by Length since Traction Based
keyo,cid,1,5       ! Structural-Electric contact
/com,*********** Create Contact "Contact Region 3" ***********
*set,tid,10
*set,cid,9
r,tid
r,cid
et,tid,170
et,cid,174
MAT,10 $ TYPE,10 $ REAL,10 $ SECNUM,10 $ ESYS,0
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MAT,9 $ TYPE,9 $ REAL,9 $ SECNUM,9 $ ESYS,0
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MAT,9 $ TYPE,9 $ REAL,10 $ SECNUM,9 $ ESYS,0
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MAT,10 $ TYPE,10 $ REAL,9 $ SECNUM,10 $ ESYS,0
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keyo,cid,8,2               ! auto create asymmetric contact (from Program Controlled setting)
keyo,cid,10,0              ! adjust contact stiffness each NR iteration (from Program Controlled setting)
keyo,cid,12,5              ! bonded always
keyo,cid,18,1              ! small sliding turned on by application
keyo,cid,2,0               ! augmented Lagrange (from Program Controlled setting)
keyo,cid,4,0               ! on Gauss point (from Program Controlled setting)
keyo,cid,9,1               ! ignore initial gaps/penetration
keyo,cid,7,0               ! No Prediction
rmod,tid,3,10.      ! FKN
rmod,tid,5,0.       ! ICONT
rmod,tid,6,0.       ! PINB
rmod,tid,10,0.      ! CNOF
rmod,tid,12,0.      ! FKT
rmod,tid,36,614     ! WB DSID
rmod,cid,3,10.      ! FKN
rmod,cid,5,0.       ! ICONT
rmod,cid,6,0.       ! PINB
rmod,cid,10,0.      ! CNOF
rmod,cid,12,0.      ! FKT
rmod,cid,36,614     ! WB DSID
*set,_maxPerm,1.00345333333333e-006
rmod,cid,19,_maxPerm/_ASMDIAG         ! ECC, Divide by Length since Traction Based
rmod,tid,19,_maxPerm/_ASMDIAG      ! ECC, Divide by Length since Traction Based
keyo,cid,1,5       ! Structural-Electric contact
nsel,all
esel,all
/com,*********** Send Named Selection as Element Component ***********
esel,s,type,,1
cm,SELECTION,elem
esel,all
/com,*********** Send Named Selection as Element Component ***********
esel,s,type,,1
esel,a,type,,3
cm,SELECTION1,elem
esel,all
/com,*********** Fixed Supports ***********
CMBLOCK,_FIXEDSU2,NODE,       13
(8i10)
      2956     -2963      3009      3028      3056     -3063      3744     -3758
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cmsel,s,_FIXEDSU2
d,all,ux,0
d,all,uy,0
d,all,uz,0
nsel,all
/com,*********** Define Force Using Surface Effect Elements ***********
local,12,0,0.,0.,0.,0.,0.,0.
csys,0
et,11,154
MAT,11 $ TYPE,11 $ REAL,11 $ SECNUM,11 $ ESYS,12
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esel,s,type,,11
keyop,11,2,1        ! Apply load in local coordinate system
keyop,11,7,1        ! Use original area so load is constant in large deformation
esel,all

*DIM,_loadvari528x,TABLE,1,1,1,FREQ, , , 0
! Frequency values
*TAXIS,_loadvari528x(1),1,1.
! Load values
_loadvari528x(1,1,1) = 0.


*DIM,_loadvari528xi,TABLE,1,1,1,FREQ, , , 0
! Frequency values
*TAXIS,_loadvari528xi(1),1,1.
! Load values
_loadvari528xi(1,1,1) = 0.


*DIM,_loadvari528y,TABLE,1,1,1,FREQ, , , 0
! Frequency values
*TAXIS,_loadvari528y(1),1,1.
! Load values
_loadvari528y(1,1,1) = -833.333333333395


*DIM,_loadvari528yi,TABLE,1,1,1,FREQ, , , 0
! Frequency values
*TAXIS,_loadvari528yi(1),1,1.
! Load values
_loadvari528yi(1,1,1) = 0.


*DIM,_loadvari528z,TABLE,1,1,1,FREQ, , , 0
! Frequency values
*TAXIS,_loadvari528z(1),1,1.
! Load values
_loadvari528z(1,1,1) = 0.


*DIM,_loadvari528zi,TABLE,1,1,1,FREQ, , , 0
! Frequency values
*TAXIS,_loadvari528zi(1),1,1.
! Load values
_loadvari528zi(1,1,1) = 0.


esel,s,type,,11
nsle
sfe,all,1,pres,1,%_loadvari528x%
sfe,all,2,pres,1,%_loadvari528y%
sfe,all,1,pres,2,%_loadvari528xi%
sfe,all,2,pres,2,%_loadvari528yi%
sfe,all,3,pres,1,%_loadvari528z%
sfe,all,3,pres,2,%_loadvari528zi%
nsel,all
esel,all
fini
/solu
antype,harm
hropt,auto
thexpand,off     ! ignore thermal strains
kbc,1
harfrq,0,28
nsub,25
outres,erase
outres,all,none
outres,nsol,all
outres,eangl,all
outres,etmp,all
outres,veng,all
outres,strs,all,
outres,epel,all,
outres,rsol,all
outres,cont,all,
outres,misc,all,
outres,fflux,all,
outres,fgrad,all
outres,fmag,all,
outres,eheat,all,
hrout,,,,yes        ! energy calculation flag set to Yes
! *********** WB SOLVE COMMAND ***********
! check interactive state
*get,ANSINTER_,active,,int
*if,ANSINTER_,ne,0,then
/eof
*endif
solve
/com *************** Write FE CONNECTORS *********
CEWRITE,file,ce,,INTE
fini
*get,_NSOLTHREADS,active,0,ntfs
*get,_NSOLPROCESSES,active,0,npfs
/post1
fini
